<?xml version="1.0" encoding="UTF-8"?>
<neuroml xmlns="http://www.neuroml.org/schema/neuroml2" xmlns:xsi="http://www.w3.org/2001/XMLSchema-instance" xsi:schemaLocation="http://www.neuroml.org/schema/neuroml2  https://raw.github.com/NeuroML/NeuroML2/master/Schemas/NeuroML2/NeuroML_v2beta.xsd" id="Golgi_040408_blue">

    <include href="KSK.nml"/>

    <include href="NaP.nml"/>

    <include href="KM.nml"/>

    <include href="Ca_HVA.nml"/>

    <include href="KA.nml"/>

    <include href="Ca_LVA.nml"/>

    <include href="CALC_ca2.nml"/>

    <include href="KBK.nml"/>

    <include href="NaR.nml"/>

    <include href="LeakConductance.nml"/>

    <include href="KV.nml"/>

    <include href="HCN1.nml"/>

    <include href="NaT.nml"/>

    <include href="HCN2.nml"/>

    <include href="CALC.nml"/>

    <cell id="Golgi_040408_blue">

        <notes>Cell morphology generated by neuroConstruct from file: Golgi_040408_C1.ASC
V3 text file written for MicroBrightField products.
</notes>

        <morphology id="morphology_Golgi_040408_blue">

            <segment id="0" name="RootSegment">
                <proximal x="8.0" y="-10.0" z="-8.0" diameter="20.0"/>
                <distal x="8.0" y="-10.0" z="-8.0" diameter="20.0"/>    <properties>

                    <property tag="comment" value="Root Segment, parent of all dendrites, etc. Should be edited to create biologically accurate soma based on soma outline"/>

                </properties>

            </segment>

            <segment id="1" name="AxonWhite_1_R">
                <parent segment="0"/>
                <proximal x="12.67" y="-18.86" z="-6.7" diameter="1.18"/>
                <distal x="12.459999" y="-19.67" z="-6.93" diameter="1.18"/>    <properties>

                    <property tag="comment" value="First segment of new sub branch"/>

                </properties>

            </segment>

            <segment id="2" name="AxonWhite_10000">
                <parent segment="1"/>
                <distal x="12.389999" y="-20.41" z="-6.25" diameter="1.18"/>
            </segment>

            <segment id="3" name="AxonWhite_10001">
                <parent segment="2"/>
                <distal x="12.1" y="-21.220001" z="-4.28" diameter="1.18"/>
            </segment>

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
            <segmentGroup id="Soma">
                <member segment="0"/>
            </segmentGroup>

            <segmentGroup id="SecAxonWhite_1_R">
                <member segment="1"/>

                <member segment="2"/>

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            </segmentGroup>

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
            <segmentGroup id="soma_group">
                <include segmentGroup="Soma"/>
            </segmentGroup>

            <segmentGroup id="colour_White">
                <include segmentGroup="SecAxonWhite_1_R"/>
                <include segmentGroup="SecAxonWhite_1_R_1"/>
                <include segmentGroup="SecAxonWhite_1_R_2"/>
            </segmentGroup>

            <segmentGroup id="axon_group">
                <include segmentGroup="SecAxonWhite_1_R"/>
                <include segmentGroup="SecAxonWhite_1_R_1"/>
                <include segmentGroup="SecAxonWhite_1_R_2"/>
            </segmentGroup>

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
        </morphology>

            <!--Adding the biophysical parameters-->

        <biophysicalProperties id="biophys">

            <membraneProperties>

                <channelDensity condDensity="0.46 mS_per_cm2" id="Ca_HVA_soma_group" ionChannel="Ca_HVA" segmentGroup="soma_group"/>

                <channelDensity condDensity="0.25 mS_per_cm2" id="Ca_LVA_soma_group" ionChannel="Ca_LVA" segmentGroup="soma_group"/>

                <channelDensity condDensity="0.05 mS_per_cm2" id="HCN1_soma_group" ionChannel="HCN1" segmentGroup="soma_group"/>

                <channelDensity condDensity="0.08 mS_per_cm2" id="HCN2_soma_group" ionChannel="HCN2" segmentGroup="soma_group"/>

                <channelDensity condDensity="8.0 mS_per_cm2" id="KA_soma_group" ionChannel="KA" segmentGroup="soma_group"/>

                <channelDensity condDensity="9.0 mS_per_cm2" id="KBK_soma_group" ionChannel="KBK" segmentGroup="soma_group"/>

                <channelDensity condDensity="1.0 mS_per_cm2" id="KM_soma_group" ionChannel="KM" segmentGroup="soma_group"/>

                <channelDensity condDensity="38.0 mS_per_cm2" id="KSK_soma_group" ionChannel="KSK" segmentGroup="soma_group"/>

                <channelDensity condDensity="32.0 mS_per_cm2" id="KV_soma_group" ionChannel="KV" segmentGroup="soma_group"/>

                <channelDensity condDensity="0.082 mS_per_cm2" id="LeakConductance_all" ionChannel="LeakConductance" erev="-55.0 mV"/>

                <channelDensity condDensity="0.19 mS_per_cm2" id="NaP_soma_group" ionChannel="NaP" segmentGroup="soma_group"/>

                <channelDensity condDensity="1.7 mS_per_cm2" id="NaR_soma_group" ionChannel="NaR" segmentGroup="soma_group"/>

                <channelDensity condDensity="48.0 mS_per_cm2" id="NaT_soma_group" ionChannel="NaT" segmentGroup="soma_group"/>

                <spikeThresh value="0 mV"/>

                <specificCapacitance value="1.0 uF_per_cm2"/>

                <initMembPotential value="-55.0 mV"/>

            </membraneProperties>

            <intracellularProperties>

                <species segmentGroup="soma_group"/>

                <species segmentGroup="soma_group"/>

                <resistivity value="0.1 kohm_cm"/>

            </intracellularProperties>

        </biophysicalProperties>

    </cell>

</neuroml>
