<?xml version="1.0" encoding="UTF-8"?>
<neuroml xmlns="http://www.neuroml.org/schema/neuroml2" xmlns:xsi="http://www.w3.org/2001/XMLSchema-instance" xsi:schemaLocation="http://www.neuroml.org/schema/neuroml2  https://raw.githubusercontent.com/NeuroML/NeuroML2/development/Schemas/NeuroML2/NeuroML_v2beta5.xsd" id="network_VervaekeEtAl_GolgiCellNetwork">

    <notes>

Network structure (NeuroML 2beta5) for project: VervaekeEtAl-GolgiCellNetwork saved with neuroConstruct v1.7.1 on: 19:01:13, 27-Sep-17

Cell Group: CellGroup_1 contains 45 cells

Network connection: NetConn_CellGroup_1_CellGroup_1 contains 352 individual synaptic connections

    </notes>

    <include href="ApicalSyn.synapse.nml"/>

    <include href="GapJuncCML.nml"/>
    <include href="Golgi_040408_C1.cell.nml"/>
    <include href="MultiDecaySyn.synapse.nml"/>

    <poissonFiringSynapse id="Input_21" averageRate="2.0 per_s" synapse="MultiDecaySyn" spikeTarget="./MultiDecaySyn"/>

    <poissonFiringSynapse id="Input_20" averageRate="0.5 per_s" synapse="ApicalSyn" spikeTarget="./ApicalSyn"/>

    <network id="network_VervaekeEtAl_GolgiCellNetwork" type="networkWithTemperature" temperature="23.0 degC">

        <population id="CellGroup_1" component="Golgi_040408_C1" type="populationList" size="45">
            <instance id="0">
                <location x="1.8063873" y="19.040333" z="158.66382"/>
            </instance>
            <instance id="1">
                <location x="209.08464" y="32.64334" z="44.90784"/>
            </instance>
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        </population>

        <electricalProjection id="NetConn_CellGroup_1_CellGroup_1" presynapticPopulation="CellGroup_1" postsynapticPopulation="CellGroup_1">
            <electricalConnectionInstance id="0" preCell="../CellGroup_1/0/Golgi_040408_C1" postCell="../CellGroup_1/24/Golgi_040408_C1" preSegment="4006" preFractionAlong="0.34745952" postSegment="3914" postFractionAlong="0.57669306" synapse="GapJuncCML" />
            <electricalConnectionInstance id="1" preCell="../CellGroup_1/0/Golgi_040408_C1" postCell="../CellGroup_1/41/Golgi_040408_C1" preSegment="3243" preFractionAlong="0.7436454" postSegment="4328" postFractionAlong="0.7180882" synapse="GapJuncCML" />
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        </electricalProjection>

        <inputList id="Input_21" component="Input_21" population="CellGroup_1">
            <input id="0" target="../CellGroup_1/0/Golgi_040408_C1_varLeakInitPot" destination="synapses" segmentId="4244" fractionAlong="0.06991738"/>
            <input id="1" target="../CellGroup_1/0/Golgi_040408_C1_varLeakInitPot" destination="synapses" segmentId="4416" fractionAlong="0.34693953"/>
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        </inputList>

        <inputList id="Input_20" component="Input_20" population="CellGroup_1">
            <input id="0" target="../CellGroup_1/0/Golgi_040408_C1_varLeakInitPot" destination="synapses" segmentId="4181" fractionAlong="0.6283141"/>
            <input id="1" target="../CellGroup_1/0/Golgi_040408_C1_varLeakInitPot" destination="synapses" segmentId="3167" fractionAlong="0.074905574"/>
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        </inputList>

    </network>

</neuroml>
